# 1. Задание
# Напишите уравнение параболы, проходящей через три точки (x,y):
# (1,2), (3,10), (5,1)
#
# Задаемся форматом уровнения:
# y = ax^2+bx+c
# Подставляем значения x в матрицу A, y в матрицу d и находим a, b, c.
A := [1, 1, 1; 9, 3, 1; 25, 5, 1]
d := [2; 10; 1]
X := lsolve(A, d) = [-2.125; 12.5; -8.375]
# Проверяем решение
x := [1; 3; 5]
y := -2.125*x^2 + 12.5*x - 8.375
y = [2; 10; 1]
# 2. Задание
# Известно, что свежий огурец на 99% состоит из воды. Месяц назад взвесили мешок со свежими огурцами. Получилось, что огурцов ровно 100 кг. Мешок убрали, а через месяц снова взвесили. Огурцы за это время усохли, и теперь вода составляет уже только 98% их веса. Сколько теперь (в кг) весят огурцы?
#
# Решение:
# Составляем уровнения для свежих огурцов
# n + 0.99x = x;
# где n - чистый сухой вес
# x - общий вес.
# Принимаем общий вес х = 100, находим n = 1
#
# Составляем уравоение для вялых огурцов
#
# n + 0.98y = y;
# зная, что n=1 =>  1 + 0.98y = y  =>  1 - 0.02y = 0
# Находим y
# y = 1/0.02
# y = 50
# 3. Задание. Определение логарифма. Решить уравнения:
log(256, 2) = 8
log(300, 2) = 8.22882
x := 2
log(2^(8*x - 4), 8) = 4
x := 6
3^log(5*x - 5, 9) = 5
x := 4.272
x^log(x + 1, 3) = 9.00047
# 4. Задание Свойства логарифмов. Вычислить:
log(16, 4) = 2
log(1/25, 5) = -2
log(25, 5) = 2
log(sqrt(27), 3) = 1.5
log(12, 2) - log(3, 2) = 2
log(12, 6) + log(3, 6) = 2
e^ln(5) = 5
log(225, 2)/log(15, 2) = 2
log(32, 4) - log(10, 0.1) = 3.5
9^log(sqrt(5), 3) = 5
